#variable 	TEMPERATURE equal 300
#variable 	RANDOM equal 387623
#variable	TIMESTEP equal 0.001
#variable 	A equal 3.6 	# lattice spacing (A)
#variable 	SYSTEMSIZE equal 4
#variable	RUNTIME equal 1000
#variable	CONC equal 30
#variable	x1 equal 4
#variable	x2 equal 0
#variable	x3 equal 1
#variable	y1 equal 0
#variable	y2 equal 1
#variable	y3 equal 0
#variable	z1 equal -1
#variable	z2 equal 0
#variable	z3 equal 4

# variable which must be included above are TEMPERATURE RANDOM TIMESTEP A SYSTEMSIZE RUNTIME CONC
# These vairables do not have to be changed with every simulation


variable	NEVERY equal 10
variable	NREPEAT equal 100
variable	NFREQ equal $(v_NEVERY*v_NREPEAT)
variable	NLOOP equal 10*${NFREQ}
variable	TRACKGRAIN equal 0 # Set to 1 to dump data for use in matlab grain tracking code.


units		metal

# GENERATE ATOMS, POSITIONS, AND VELOCITIES

dimension 	3
boundary	p p p
atom_style 	atomic


lattice		fcc ${A} orient x 1 0 0 orient y 0 1 0 orient z 0 0 1


region		wholeSim block 0 $(2*v_SYSTEMSIZE) 0 ${SYSTEMSIZE} 0 ${SYSTEMSIZE} units lattice
region 		side1 block 0 $(v_SYSTEMSIZE-1/2) 0 ${SYSTEMSIZE} 0 ${SYSTEMSIZE} units lattice
region 		side2 block ${SYSTEMSIZE} $(2*v_SYSTEMSIZE) 0 ${SYSTEMSIZE} 0 ${SYSTEMSIZE} units lattice
create_box 	2 wholeSim

pair_style	eam/alloy
pair_coeff	* * CuNi.eam.alloy Ni Cu


create_atoms	1 region side1
delete_atoms	porosity side1 $(v_CONC/100) ${RANDOM}
create_atoms	2 region side1

lattice		fcc ${A} orient x ${x1} ${x2} ${x3} orient y ${y1} ${y2} ${y3} orient z ${z1} ${z2} ${z3}
create_atoms 	1 region side2
delete_atoms	porosity side2 $(v_CONC/100) $(v_RANDOM+1)
create_atoms	2 region side2
group		Ni type 1
group 		Cu type 2
delete_atoms  	overlap 1 Cu Ni

group		Ni delete
group 		Cu delete
group		Ni type 1
group 		Cu type 2

velocity 	all create ${TEMPERATURE} ${RANDOM}

neighbor	0.3 bin
timestep	${TIMESTEP}
reset_timestep	0

# RUN SYSTEM CONVERGENCE

dump		1 all xyz 10 dump.xyz
min_style	cg
minimize	1e-15 1e-15 1000 10000

reset_timestep	0

undump 1
log		log.convGB
include 	initConv.mod
include 	convergence.mod
include 	exitConv.mod

if "${TRACKGRAIN} == 1" then "jump in.grainBdryTemplate track" else "jump in.grainBdryTemplate break"


# DO THIS IF TRACKING THE GRAIN BAOUNDARY
label		track
compute 	cna all cna/atom $(0.8536*v_A)
compute 	centro all centro/atom fcc
dump		3 all custom 1000 dump.bdry x y z c_cna c_centro


# CONTINUE THE REGULAR SCRIPT

label		break

# RUN THE SIMULATION

include 	initConv.mod

log		log.runGB
run 		${RUNTIME}

# GET THE FINAL ENERGY OF THE SYSTEM WITH A GRAIN BOUNDARY

variable 	Eg equal $(v_varAveEnergy)
variable	dEg equal $(v_energySTD)

variable	Y equal ly
variable	Z equal lz
variable	Area equal $(2.0*v_Y*v_Z)
variable 	dArea equal abs(${Area})*sqrt((${volumeSTD}^(1/3)/${Y})^2+(${volumeSTD}^(1/3)/${Z})^2)
include 	exitConv.mod

# RESTARTING THE SIMULATION TO RUN WITH NO TILT

if "${TRACKGRAIN} == 1" then "undump 3"


delete_atoms	group all
change_box	all x final 0 ${SYSTEMSIZE} y final 0 ${SYSTEMSIZE} z final 0 ${SYSTEMSIZE} units lattice


lattice		fcc ${A} orient x 1 0 0 orient y 0 1 0 orient z 0 0 1

create_atoms	1 region side1
delete_atoms	porosity side1 $(v_CONC/100) ${RANDOM}
create_atoms	2 region wholeSim

group		Ni delete
group 		Cu delete
group		Ni type 1
group 		Cu type 2

delete_atoms	overlap 0.1 Cu Ni

group		Ni delete
group 		Cu delete
group		Ni type 1
group 		Cu type 2

velocity 	all create ${TEMPERATURE} ${RANDOM}


# RUNNING CONVERGENCE CHECKING

reset_timestep 0
thermo 100
thermo_style custom step etotal pe temp press vol


min_style	cg
minimize	1e-15 1e-15 1000 10000

log			log.conv
include 	initConv.mod
include 	convergence.mod
include 	exitConv.mod

# RUN THE SIMULATION

include 	initConv.mod

log		log.run
run 		${RUNTIME}

# GET THE FINAL ENERGY OF THE SYSTEM WITH A GRAIN BOUNDARY

variable 	E1 equal $(v_varAveEnergy)
variable	dE1 equal $(v_energySTD)


delete_atoms	group all
change_box	all x final 0 ${SYSTEMSIZE} y final 0 ${SYSTEMSIZE} z final 0 ${SYSTEMSIZE} units lattice


lattice		fcc ${A} orient x ${x1} ${x2} ${x3} orient y ${y1} ${y2} ${y3} orient z ${z1} ${z2} ${z3}

create_atoms	1 region side1
delete_atoms	porosity side1 $(v_CONC/100) ${RANDOM}
create_atoms	2 region wholeSim

group		Ni delete
group 		Cu delete
group		Ni type 1
group 		Cu type 2

delete_atoms	overlap 0.1 Cu Ni

group		Ni delete
group 		Cu delete
group		Ni type 1
group 		Cu type 2

velocity 	all create ${TEMPERATURE} ${RANDOM}


# RUNNING CONVERGENCE CHECKING

reset_timestep 0
thermo 100
thermo_style custom step etotal pe temp press vol


min_style	cg
minimize	1e-15 1e-15 1000 10000

log			log.conv
include 	initConv.mod
include 	convergence.mod
include 	exitConv.mod

# RUN THE SIMULATION

include 	initConv.mod

log		log.run
run 		${RUNTIME}

# GET THE FINAL ENERGY OF THE SYSTEM WITH A GRAIN BOUNDARY

variable 	E2 equal $(v_varAveEnergy)
variable	dE2 equal $(v_energySTD)


variable 	EperA equal $((v_Eg-v_E1-v_E2)/v_Area)
variable	diff equal ${Eg}-${E1}-${E2}


log		log.results

print "The energy of region 1 without tilt:			${E1} +/- ${dE1}"
print "The energy of region 2 without tilt:			${E2} +/- ${dE2}"
print "The energy per atom with tilt:				${Eg} +/- ${dEg}"
print "The energy per atom per area due to the interface:	${EperA} +/- $(abs(v_EperA)*sqrt((v_dEg/v_diff)^2+(v_dE1/v_diff)^2+(v_dE2/v_diff)^2+(v_dArea/v_Area)^2))"
